*HEADING
Abaqus export from ScanIP+FE
Units: millimetres
**==============================================================================
**MATERIAL DEFINITIONS BEGIN
**==============================================================================
**==============================================================================
**MATERIAL PLACEHOLDER BEGIN
**Shells: sectioned5 with ZMIN
**Shells Material: sectioned5 with ZMIN
*SHELL GENERAL SECTION, ELSET=SH_SECTIONED5_WITH_ZMIN, MATERIAL=SM_SECTIONED5
0.5
*MATERIAL, NAME=SM_SECTIONED5
**MATERIAL PLACEHOLDER END
**==============================================================================
**==============================================================================
**MATERIAL PLACEHOLDER BEGIN
**Shells: sectioned4 with ZMIN
**Shells Material: sectioned4 with ZMIN
*SHELL GENERAL SECTION, ELSET=SH_SECTIONED4_WITH_ZMIN, MATERIAL=SM_SECTIONED4
0.5
*MATERIAL, NAME=SM_SECTIONED4
**MATERIAL PLACEHOLDER END
**==============================================================================
**==============================================================================
**MATERIAL PLACEHOLDER BEGIN
**Shells: sectioned3 with ZMIN
**Shells Material: sectioned3 with ZMIN
*SHELL GENERAL SECTION, ELSET=SH_SECTIONED3_WITH_ZMIN, MATERIAL=SM_SECTIONED3
0.5
*MATERIAL, NAME=SM_SECTIONED3
**MATERIAL PLACEHOLDER END
**==============================================================================
**==============================================================================
**MATERIAL PLACEHOLDER BEGIN
**Shells: sectioned2 with ZMIN
**Shells Material: sectioned2 with ZMIN
*SHELL GENERAL SECTION, ELSET=SH_SECTIONED2_WITH_ZMIN, MATERIAL=SM_SECTIONED2
0.5
*MATERIAL, NAME=SM_SECTIONED2
**MATERIAL PLACEHOLDER END
**==============================================================================
**==============================================================================
**MATERIAL PLACEHOLDER BEGIN
**Shells: sectioned1 with ZMIN
**Shells Material: sectioned1 with ZMIN
*SHELL GENERAL SECTION, ELSET=SH_SECTIONED1_WITH_ZMIN, MATERIAL=SM_SECTIONED1
0.5
*MATERIAL, NAME=SM_SECTIONED1
**MATERIAL PLACEHOLDER END
**==============================================================================
**==============================================================================
**MATERIAL PLACEHOLDER BEGIN
**Shells: inPlane5 with ZMIN
**Shells Material: inPlane5 with ZMIN
*SHELL GENERAL SECTION, ELSET=SH_INPLANE5_WITH_ZMIN, MATERIAL=SM_INPLANE5
0.5
*MATERIAL, NAME=SM_INPLANE5
**MATERIAL PLACEHOLDER END
**==============================================================================
**==============================================================================
**MATERIAL PLACEHOLDER BEGIN
**Shells: inPlane4 with ZMIN
**Shells Material: inPlane4 with ZMIN
*SHELL GENERAL SECTION, ELSET=SH_INPLANE4_WITH_ZMIN, MATERIAL=SM_INPLANE4
0.5
*MATERIAL, NAME=SM_INPLANE4
**MATERIAL PLACEHOLDER END
**==============================================================================
**==============================================================================
**MATERIAL PLACEHOLDER BEGIN
**Shells: inPlane3 with ZMIN
**Shells Material: inPlane3 with ZMIN
*SHELL GENERAL SECTION, ELSET=SH_INPLANE3_WITH_ZMIN, MATERIAL=SM_INPLANE3
0.5
*MATERIAL, NAME=SM_INPLANE3
**MATERIAL PLACEHOLDER END
**==============================================================================
**==============================================================================
**MATERIAL PLACEHOLDER BEGIN
**Shells: inPlane2 with ZMIN
**Shells Material: inPlane2 with ZMIN
*SHELL GENERAL SECTION, ELSET=SH_INPLANE2_WITH_ZMIN, MATERIAL=SM_INPLANE2
0.5
*MATERIAL, NAME=SM_INPLANE2
**MATERIAL PLACEHOLDER END
**==============================================================================
**==============================================================================
**MATERIAL PLACEHOLDER BEGIN
**Shells: inPlane1 with ZMIN
**Shells Material: inPlane1 with ZMIN
*SHELL GENERAL SECTION, ELSET=SH_INPLANE1_WITH_ZMIN, MATERIAL=SM_INPLANE1
0.5
*MATERIAL, NAME=SM_INPLANE1
**MATERIAL PLACEHOLDER END
**==============================================================================
**==============================================================================
**MATERIAL DEFINITIONS END
**==============================================================================
**==============================================================================
**CONTACT DEFINITIONS BEGIN
**==============================================================================
**==============================================================================
**CONTACT DEFINITION BEGIN
**Contact: sectioned5 with inPlane5
**CONTACT DEFINITION END
**==============================================================================
**==============================================================================
**CONTACT DEFINITION BEGIN
**Contact: sectioned5 with inPlane4
**CONTACT DEFINITION END
**==============================================================================
**==============================================================================
**CONTACT DEFINITION BEGIN
**Contact: sectioned4 with inPlane4
**CONTACT DEFINITION END
**==============================================================================
**==============================================================================
**CONTACT DEFINITION BEGIN
**Contact: sectioned4 with inPlane3
**CONTACT DEFINITION END
**==============================================================================
**==============================================================================
**CONTACT DEFINITION BEGIN
**Contact: sectioned3 with inPlane3
**CONTACT DEFINITION END
**==============================================================================
**==============================================================================
**CONTACT DEFINITION BEGIN
**Contact: sectioned3 with inPlane2
**CONTACT DEFINITION END
**==============================================================================
**==============================================================================
**CONTACT DEFINITION BEGIN
**Contact: sectioned2 with inPlane2
**CONTACT DEFINITION END
**==============================================================================
**==============================================================================
**CONTACT DEFINITION BEGIN
**Contact: sectioned2 with inPlane1
**CONTACT DEFINITION END
**==============================================================================
**==============================================================================
**CONTACT DEFINITION BEGIN
**Contact: sectioned1 with inPlane1
**CONTACT DEFINITION END
**==============================================================================
**==============================================================================
**CONTACT DEFINITION BEGIN
**Contact: inPlane5 with sectionned6
**CONTACT DEFINITION END
**==============================================================================
**==============================================================================
**CONTACT DEFINITIONS END
**==============================================================================
**==============================================================================
**NODE DATA BEGIN
**==============================================================================
*NODE
1, 1.311407089233e+000, 1.817316412926e-001, 0.000000000000e+000
2, 1.321228861809e+000, 1.732792109251e-001, 9.197711013258e-003
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**==============================================================================
**NODE DATA END
**==============================================================================
**==============================================================================
**SOLID ELEMENT DATA BEGIN
**==============================================================================
**==============================================================================
**SOLID ELEMENT DATA END
**==============================================================================
**==============================================================================
**SHELL ELEMENT DATA BEGIN
**==============================================================================
**==============================================================================
**SHELL ELEMENTS - Contact: sectioned5 with ZMIN BEGIN
**Shells Material: sectioned5 with ZMIN
**Material ID: SM_SECTIONED5
**Material Index: 1
**==============================================================================
**SHELL ELEMENTS (TRIANGULAR) - Contact: sectioned5 with ZMIN BEGIN
*ELEMENT, TYPE=S3R, ELSET=SH_SECTIONED5_WITH_ZMIN
50873,663,260,815
50874,736,742,744
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**SHELL ELEMENTS (TRIANGULAR) - Contact: sectioned5 with ZMIN END
**==============================================================================
**SHELL ELEMENTS - Contact: sectioned5 with ZMIN END
**==============================================================================
**==============================================================================
**SHELL ELEMENTS - Contact: sectioned4 with ZMIN BEGIN
**Shells Material: sectioned4 with ZMIN
**Material ID: SM_SECTIONED4
**Material Index: 2
**==============================================================================
**SHELL ELEMENTS (TRIANGULAR) - Contact: sectioned4 with ZMIN BEGIN
*ELEMENT, TYPE=S3R, ELSET=SH_SECTIONED4_WITH_ZMIN
52836,1608,1007,1602
52837,1645,1627,2027
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**SHELL ELEMENTS (TRIANGULAR) - Contact: sectioned4 with ZMIN END
**==============================================================================
**SHELL ELEMENTS - Contact: sectioned4 with ZMIN END
**==============================================================================
**==============================================================================
**SHELL ELEMENTS - Contact: sectioned3 with ZMIN BEGIN
**Shells Material: sectioned3 with ZMIN
**Material ID: SM_SECTIONED3
**Material Index: 3
**==============================================================================
**SHELL ELEMENTS (TRIANGULAR) - Contact: sectioned3 with ZMIN BEGIN
*ELEMENT, TYPE=S3R, ELSET=SH_SECTIONED3_WITH_ZMIN
54774,2880,2771,2765
54775,2200,2824,2832
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**SHELL ELEMENTS (TRIANGULAR) - Contact: sectioned3 with ZMIN END
**==============================================================================
**SHELL ELEMENTS - Contact: sectioned3 with ZMIN END
**==============================================================================
**==============================================================================
**SHELL ELEMENTS - Contact: sectioned2 with ZMIN BEGIN
**Shells Material: sectioned2 with ZMIN
**Material ID: SM_SECTIONED2
**Material Index: 4
**==============================================================================
**SHELL ELEMENTS (TRIANGULAR) - Contact: sectioned2 with ZMIN BEGIN
*ELEMENT, TYPE=S3R, ELSET=SH_SECTIONED2_WITH_ZMIN
56153,3689,3692,3687
56154,3437,3423,3422
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**SHELL ELEMENTS (TRIANGULAR) - Contact: sectioned2 with ZMIN END
**==============================================================================
**SHELL ELEMENTS - Contact: sectioned2 with ZMIN END
**==============================================================================
**==============================================================================
**SHELL ELEMENTS - Contact: sectioned1 with ZMIN BEGIN
**Shells Material: sectioned1 with ZMIN
**Material ID: SM_SECTIONED1
**Material Index: 5
**==============================================================================
**SHELL ELEMENTS (TRIANGULAR) - Contact: sectioned1 with ZMIN BEGIN
*ELEMENT, TYPE=S3R, ELSET=SH_SECTIONED1_WITH_ZMIN
57604,4818,4129,4130
57605,4876,4867,4870
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**SHELL ELEMENTS (TRIANGULAR) - Contact: sectioned1 with ZMIN END
**==============================================================================
**SHELL ELEMENTS - Contact: sectioned1 with ZMIN END
**==============================================================================
**==============================================================================
**SHELL ELEMENTS - Contact: inPlane5 with ZMIN BEGIN
**Shells Material: inPlane5 with ZMIN
**Material ID: SM_INPLANE5
**Material Index: 6
**==============================================================================
**SHELL ELEMENTS (TRIANGULAR) - Contact: inPlane5 with ZMIN BEGIN
*ELEMENT, TYPE=S3R, ELSET=SH_INPLANE5_WITH_ZMIN
59715,5023,5025,5410
59716,5359,4959,5417
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**SHELL ELEMENTS (TRIANGULAR) - Contact: inPlane5 with ZMIN END
**==============================================================================
**SHELL ELEMENTS - Contact: inPlane5 with ZMIN END
**==============================================================================
**==============================================================================
**SHELL ELEMENTS - Contact: inPlane4 with ZMIN BEGIN
**Shells Material: inPlane4 with ZMIN
**Material ID: SM_INPLANE4
**Material Index: 7
**==============================================================================
**SHELL ELEMENTS (TRIANGULAR) - Contact: inPlane4 with ZMIN BEGIN
*ELEMENT, TYPE=S3R, ELSET=SH_INPLANE4_WITH_ZMIN
60477,5874,5871,5870
60478,5855,5853,5852
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**SHELL ELEMENTS (TRIANGULAR) - Contact: inPlane4 with ZMIN END
**==============================================================================
**SHELL ELEMENTS - Contact: inPlane4 with ZMIN END
**==============================================================================
**==============================================================================
**SHELL ELEMENTS - Contact: inPlane3 with ZMIN BEGIN
**Shells Material: inPlane3 with ZMIN
**Material ID: SM_INPLANE3
**Material Index: 8
**==============================================================================
**SHELL ELEMENTS (TRIANGULAR) - Contact: inPlane3 with ZMIN BEGIN
*ELEMENT, TYPE=S3R, ELSET=SH_INPLANE3_WITH_ZMIN
62518,6110,6119,6123
62519,7056,7057,7052
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**SHELL ELEMENTS (TRIANGULAR) - Contact: inPlane3 with ZMIN END
**==============================================================================
**SHELL ELEMENTS - Contact: inPlane3 with ZMIN END
**==============================================================================
**==============================================================================
**SHELL ELEMENTS - Contact: inPlane2 with ZMIN BEGIN
**Shells Material: inPlane2 with ZMIN
**Material ID: SM_INPLANE2
**Material Index: 9
**==============================================================================
**SHELL ELEMENTS (TRIANGULAR) - Contact: inPlane2 with ZMIN BEGIN
*ELEMENT, TYPE=S3R, ELSET=SH_INPLANE2_WITH_ZMIN
64174,7633,7885,7630
64175,7910,8128,7913
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**SHELL ELEMENTS (TRIANGULAR) - Contact: inPlane2 with ZMIN END
**==============================================================================
**SHELL ELEMENTS - Contact: inPlane2 with ZMIN END
**==============================================================================
**==============================================================================
**SHELL ELEMENTS - Contact: inPlane1 with ZMIN BEGIN
**Shells Material: inPlane1 with ZMIN
**Material ID: SM_INPLANE1
**Material Index: 10
**==============================================================================
**SHELL ELEMENTS (TRIANGULAR) - Contact: inPlane1 with ZMIN BEGIN
*ELEMENT, TYPE=S3R, ELSET=SH_INPLANE1_WITH_ZMIN
65458,9025,9022,9024
65459,8654,8657,8652
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**SHELL ELEMENTS (TRIANGULAR) - Contact: inPlane1 with ZMIN END
**==============================================================================
**SHELL ELEMENTS - Contact: inPlane1 with ZMIN END
**==============================================================================
**==============================================================================
**SHELL ELEMENT DATA END
**==============================================================================
**==============================================================================
**CONTACT SURFACE DATA BEGIN
**==============================================================================
**==============================================================================
**CONTACT SURFACE BEGIN
**==============================================================================
**CONTACT SURFACE NODES BEGIN
**Contact: sectioned5 with inPlane5
*SURFACE, NAME=SF_SECTIONED5_WITH_INPLANE5, TYPE=NODE
1,
2,
3,
4,
5,
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201,
**CONTACT SURFACE NODES END
**==============================================================================
**CONTACT SURFACE END
**==============================================================================
**==============================================================================
**CONTACT SURFACE BEGIN
**==============================================================================
**CONTACT SURFACE NODES BEGIN
**Contact: sectioned5 with inPlane4
*SURFACE, NAME=SF_SECTIONED5_WITH_INPLANE4, TYPE=NODE
202,
203,
204,
205,
206,
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398,
**CONTACT SURFACE NODES END
**==============================================================================
**CONTACT SURFACE END
**==============================================================================
**==============================================================================
**CONTACT SURFACE BEGIN
**==============================================================================
**CONTACT SURFACE NODES BEGIN
**Contact: sectioned4 with inPlane4
*SURFACE, NAME=SF_SECTIONED4_WITH_INPLANE4, TYPE=NODE
827,
828,
829,
830,
831,
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996,
**CONTACT SURFACE NODES END
**==============================================================================
**CONTACT SURFACE END
**==============================================================================
**==============================================================================
**CONTACT SURFACE BEGIN
**==============================================================================
**CONTACT SURFACE NODES BEGIN
**Contact: sectioned4 with inPlane3
*SURFACE, NAME=SF_SECTIONED4_WITH_INPLANE3, TYPE=NODE
997,
998,
999,
1000,
1001,
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1568,
**CONTACT SURFACE NODES END
**==============================================================================
**CONTACT SURFACE END
**==============================================================================
**==============================================================================
**CONTACT SURFACE BEGIN
**==============================================================================
**CONTACT SURFACE NODES BEGIN
**Contact: sectioned3 with inPlane3
*SURFACE, NAME=SF_SECTIONED3_WITH_INPLANE3, TYPE=NODE
2041,
2042,
2043,
2044,
2045,
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2404,
**CONTACT SURFACE NODES END
**==============================================================================
**CONTACT SURFACE END
**==============================================================================
**==============================================================================
**CONTACT SURFACE BEGIN
**==============================================================================
**CONTACT SURFACE NODES BEGIN
**Contact: sectioned3 with inPlane2
*SURFACE, NAME=SF_SECTIONED3_WITH_INPLANE2, TYPE=NODE
2405,
2406,
2407,
2408,
2409,
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2626,
**CONTACT SURFACE NODES END
**==============================================================================
**CONTACT SURFACE END
**==============================================================================
**==============================================================================
**CONTACT SURFACE BEGIN
**==============================================================================
**CONTACT SURFACE NODES BEGIN
**Contact: sectioned2 with inPlane2
*SURFACE, NAME=SF_SECTIONED2_WITH_INPLANE2, TYPE=NODE
2899,
2900,
2901,
2902,
2903,
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3156,
**CONTACT SURFACE NODES END
**==============================================================================
**CONTACT SURFACE END
**==============================================================================
**==============================================================================
**CONTACT SURFACE BEGIN
**==============================================================================
**CONTACT SURFACE NODES BEGIN
**Contact: sectioned2 with inPlane1
*SURFACE, NAME=SF_SECTIONED2_WITH_INPLANE1, TYPE=NODE
3157,
3158,
3159,
3160,
3161,
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3389,
**CONTACT SURFACE NODES END
**==============================================================================
**CONTACT SURFACE END
**==============================================================================
**==============================================================================
**CONTACT SURFACE BEGIN
**==============================================================================
**CONTACT SURFACE NODES BEGIN
**Contact: sectioned1 with inPlane1
*SURFACE, NAME=SF_SECTIONED1_WITH_INPLANE1, TYPE=NODE
3844,
3845,
3846,
3847,
3848,
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4072,
**CONTACT SURFACE NODES END
**==============================================================================
**CONTACT SURFACE END
**==============================================================================
**==============================================================================
**CONTACT SURFACE BEGIN
**==============================================================================
**CONTACT SURFACE NODE SET BEGIN
**Contact NodeSet: sectioned1 with XMIN
*NSET, NSET=NS_SECTIONED1_WITH_XMIN
4073,4074,4075,4076,4077,4078
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**CONTACT SURFACE NODE SET END
**==============================================================================
**CONTACT SURFACE END
**==============================================================================
**==============================================================================
**CONTACT SURFACE BEGIN
**==============================================================================
**CONTACT SURFACE NODES BEGIN
**Contact: inPlane5 with sectioned5
*SURFACE, NAME=SF_INPLANE5_WITH_SECTIONED5, TYPE=NODE
4938,
4939,
4940,
4941,
4942,
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5138,
**CONTACT SURFACE NODES END
**==============================================================================
**CONTACT SURFACE END
**==============================================================================
**==============================================================================
**CONTACT SURFACE BEGIN
**==============================================================================
**CONTACT SURFACE NODES BEGIN
**Contact: inPlane5 with sectionned6
*SURFACE, NAME=SF_INPLANE5_WITH_SECTIONNED6, TYPE=NODE
5139,
5140,
5141,
5142,
5143,
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5344,
**CONTACT SURFACE NODES END
**==============================================================================
**CONTACT SURFACE END
**==============================================================================
**==============================================================================
**CONTACT SURFACE BEGIN
**==============================================================================
**CONTACT SURFACE NODES BEGIN
**Contact: inPlane4 with sectioned5
*SURFACE, NAME=SF_INPLANE4_WITH_SECTIONED5, TYPE=NODE
5424,
5425,
5426,
5427,
5428,
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5620,
**CONTACT SURFACE NODES END
**==============================================================================
**CONTACT SURFACE END
**==============================================================================
**==============================================================================
**CONTACT SURFACE BEGIN
**==============================================================================
**CONTACT SURFACE NODES BEGIN
**Contact: inPlane4 with sectioned4
*SURFACE, NAME=SF_INPLANE4_WITH_SECTIONED4, TYPE=NODE
5621,
5622,
5623,
5624,
5625,
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5790,
**CONTACT SURFACE NODES END
**==============================================================================
**CONTACT SURFACE END
**==============================================================================
**==============================================================================
**CONTACT SURFACE BEGIN
**==============================================================================
**CONTACT SURFACE NODES BEGIN
**Contact: inPlane3 with sectioned4
*SURFACE, NAME=SF_INPLANE3_WITH_SECTIONED4, TYPE=NODE
6105,
6106,
6107,
6108,
6109,
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6676,
**CONTACT SURFACE NODES END
**==============================================================================
**CONTACT SURFACE END
**==============================================================================
**==============================================================================
**CONTACT SURFACE BEGIN
**==============================================================================
**CONTACT SURFACE NODES BEGIN
**Contact: inPlane3 with sectioned3
*SURFACE, NAME=SF_INPLANE3_WITH_SECTIONED3, TYPE=NODE
6677,
6678,
6679,
6680,
6681,
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7040,
**CONTACT SURFACE NODES END
**==============================================================================
**CONTACT SURFACE END
**==============================================================================
**==============================================================================
**CONTACT SURFACE BEGIN
**==============================================================================
**CONTACT SURFACE NODES BEGIN
**Contact: inPlane2 with sectioned3
*SURFACE, NAME=SF_INPLANE2_WITH_SECTIONED3, TYPE=NODE
7397,
7398,
7399,
7400,
7401,
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7618,
**CONTACT SURFACE NODES END
**==============================================================================
**CONTACT SURFACE END
**==============================================================================
**==============================================================================
**CONTACT SURFACE BEGIN
**==============================================================================
**CONTACT SURFACE NODES BEGIN
**Contact: inPlane2 with sectioned2
*SURFACE, NAME=SF_INPLANE2_WITH_SECTIONED2, TYPE=NODE
7619,
7620,
7621,
7622,
7623,
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7876,
**CONTACT SURFACE NODES END
**==============================================================================
**CONTACT SURFACE END
**==============================================================================
**==============================================================================
**CONTACT SURFACE BEGIN
**==============================================================================
**CONTACT SURFACE NODES BEGIN
**Contact: inPlane1 with sectioned2
*SURFACE, NAME=SF_INPLANE1_WITH_SECTIONED2, TYPE=NODE
8139,
8140,
8141,
8142,
8143,
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8371,
**CONTACT SURFACE NODES END
**==============================================================================
**CONTACT SURFACE END
**==============================================================================
**==============================================================================
**CONTACT SURFACE BEGIN
**==============================================================================
**CONTACT SURFACE NODES BEGIN
**Contact: inPlane1 with sectioned1
*SURFACE, NAME=SF_INPLANE1_WITH_SECTIONED1, TYPE=NODE
8372,
8373,
8374,
8375,
8376,
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8600,
**CONTACT SURFACE NODES END
**==============================================================================
**CONTACT SURFACE END
**==============================================================================
**==============================================================================
**CONTACT SURFACE BEGIN
**==============================================================================
**CONTACT SURFACE NODES BEGIN
**Contact: sectionned6 with inPlane5
*SURFACE, NAME=SF_SECTIONNED6_WITH_INPLANE5, TYPE=NODE
9061,
9062,
9063,
9064,
9065,
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9266,
**CONTACT SURFACE NODES END
**==============================================================================
**CONTACT SURFACE END
**==============================================================================
**==============================================================================
**CONTACT SURFACE DATA END
**==============================================================================
